# OpenSim document version 30516
Model WUShoulderModel_S2M_box_lifting:
  gravity: 0 0 -9.8
  Ground
  BodySet:
    Body box: mass=6 [kg] mass_center=(0 0 0) inertia=(5e-5 5e-5 5e-5 0 0 0) meshes=box_manutention.vtp
    Body sensor1: mass=0.09 mass_center=(0 0 0) inertia=(7.61307e-5 7.61307e-5 7.61307e-5 0 0 0) meshes=sensor1.vtp
  JointSet:
    CustomJoint ground_box: socket_parent_frame_connectee_name=../ground socket_child_frame_connectee_name=../box
      Coordinate box_rotX: default_value=0 range=(-4 4) clamped=true
      Coordinate box_rotY: default_value=0 range=(-4 4) clamped=true
      Coordinate box_rotZ: default_value=0 range=(-4 4) clamped=true
      Coordinate box_transX: default_value=0 range=(-25 25) clamped=true
      Coordinate box_transY: default_value=0 range=(-25 25) clamped=true
      Coordinate box_transZ: default_value=0 range=(-25 25) clamped=true
      SpatialTransform:
        TransformAxis rotation1: coordinates=box_rotX axis=(1 0 0) LinearFunction(coefficients=1 0)
        TransformAxis rotation2: coordinates=box_rotY axis=(0 1 0) LinearFunction(coefficients=1 0)
        TransformAxis rotation3: coordinates=box_rotZ axis=(0 0 1) LinearFunction(coefficients=1 0)
        TransformAxis translation1: coordinates=box_transX axis=(1 0 0) LinearFunction(coefficients=1 0)
        TransformAxis translation2: coordinates=box_transY axis=(0 1 0) LinearFunction(coefficients=1 0)
        TransformAxis translation3: coordinates=box_transZ axis=(0 0 1) LinearFunction(coefficients=1 0)
    WeldJoint box-sensor1: socket_parent_frame_connectee_name=box_offset socket_child_frame_connectee_name=../sensor1
      PhysicalOffsetFrame box_offset: socket_parent_connectee_name=../../box translation=(0.097 -0.046 0.213) [meters]
          orientation=(0 -1.5708 0) [radians]
  MarkerSet:
    Marker boite_avant_droit: socket_parent_frame_connectee_name=../box (0.15 0 0.15) fixed=true
    Marker boite_avant_gauche: socket_parent_frame_connectee_name=../box (0.15 0 -0.15) fixed=true
    Marker boite_arriere_droit: socket_parent_frame_connectee_name=../box (-0.15 0 0.15) fixed=true
    Marker boite_arriere_gauche: socket_parent_frame_connectee_name=../box (-0.15 0 -0.15) fixed=true
    Marker boite_gauche_int: socket_parent_frame_connectee_name=../box (0.176 -0.045 -0.196) fixed=true
    Marker boite_gauche_ext: socket_parent_frame_connectee_name=../box (0.176 -0.045 -0.231) fixed=true
    Marker boite_droite_int: socket_parent_frame_connectee_name=../box (0.176 -0.045 0.196) fixed=true
    Marker boite_droite_ext: socket_parent_frame_connectee_name=../box (0.176 -0.045 0.231) fixed=true
    Marker sensor1_centre: socket_parent_frame_connectee_name=../sensor1 (0 0 0) fixed=true
    Marker Z-sensor: socket_parent_frame_connectee_name=../sensor1 (0 0 0.2) fixed=true
    Marker X-sensor: socket_parent_frame_connectee_name=../sensor1 (0.1 0 0) fixed=true
