# OpenSim document version 30000
InverseKinematicsTool:
  constraint_weight: Inf
  accuracy: 1e-7
  time_range: 0 2.66
  report_errors: true
  report_marker_locations: false
  IKTaskSet:
    IKMarkerTask STER: apply=true weight=10
    IKMarkerTask STERl: apply=true weight=5
    IKMarkerTask STERr: apply=true weight=5
    IKMarkerTask XIPH: apply=true weight=5
    IKMarkerTask T10: apply=true weight=10
    IKMarkerTask T1: apply=true weight=10
    IKMarkerTask CLAV_SC: apply=true weight=20
    IKMarkerTask CLAV_AC: apply=true weight=20
    IKMarkerTask SCAP_IA: apply=true weight=0.5
    IKMarkerTask SCAP_RS: apply=true weight=0.5
    IKMarkerTask SCAP_AA: apply=true weight=10
    IKMarkerTask SCAP_CP: apply=true weight=5
    IKMarkerTask SCAP_SA: apply=true weight=5
    IKMarkerTask SCAPl: apply=true weight=1
    IKMarkerTask SCAPm: apply=true weight=1
    IKMarkerTask EPICl: apply=true weight=10
    IKMarkerTask EPICm: apply=true weight=40
    IKMarkerTask DELT: apply=true weight=1
    IKMarkerTask ARMp_up: apply=true weight=1
    IKMarkerTask ARMl: apply=true weight=1
    IKMarkerTask ARMm: apply=true weight=1
    IKMarkerTask ARMp_do: apply=true weight=1
    IKMarkerTask STYLr: apply=true weight=20
    IKMarkerTask STYLu: apply=true weight=20
    IKMarkerTask LARM_elb: apply=true weight=5
    IKMarkerTask LARMm: apply=true weight=1
    IKMarkerTask LARMl: apply=true weight=1
    IKMarkerTask LARM_ant: apply=true weight=1
    IKMarkerTask STYLr_up: apply=true weight=5
    IKMarkerTask WRIST: apply=true weight=5
    IKMarkerTask INDEX: apply=true weight=50
    IKMarkerTask LATH: apply=true weight=50
    IKMarkerTask LASTC: apply=true weight=50
    IKMarkerTask MEDH: apply=true weight=50
    IKMarkerTask boite_avant_droit: apply=true weight=1
    IKMarkerTask boite_avant_gauche: apply=true weight=1
    IKMarkerTask boite_arriere_droit: apply=true weight=1
    IKMarkerTask boite_arriere_gauche: apply=true weight=1
    IKMarkerTask boite_gauche_int: apply=true weight=1
    IKMarkerTask boite_gauche_ext: apply=true weight=1
    IKMarkerTask boite_droite_int: apply=true weight=1
    IKMarkerTask boite_droite_ext: apply=true weight=1
